// COMSOL Multiphysics 6.4.0.429 model "LASTONE.mph"
// Outline of the model tree

Geometry
  geom1 "Geometry 1" (3D, length unit cm)
    blk1: Block | size = {100, 10, 0.5}
    cyl1: Cylinder | r = 3; h = 0.5; pos = {10, 5, 0}
    arr1: Array
      input = cyl1
      size = {9, 1, 1}
      fullsize = {9, 1, 1}
      displ = {10, 0, 0}
      indexattrtag = arr1.index
      indexattrtags = {arr1.index1, arr1.index2, arr1.index3}
    cyl2: Cylinder | r = 3; h = 0.5; pos = {15, 0, 0}
    arr2: Array
      input = cyl2
      size = {8, 1, 1}
      fullsize = {8, 1, 1}
      displ = {10, 0, 0}
      indexattrtag = arr2.index
      indexattrtags = {arr2.index1, arr2.index2, arr2.index3}
    cyl3: Cylinder | r = 3; h = 0.5; pos = {15, 10, 0}
    arr3: Array
      input = cyl3
      size = {8, 1, 1}
      fullsize = {8, 1, 1}
      displ = {10, 0, 0}
      indexattrtag = arr3.index
      indexattrtags = {arr3.index1, arr3.index2, arr3.index3}
    dif1: Difference | input = blk1; input2 = arr1, arr2, arr3
    fin: Finalize "Form Union"

Materials
  mat1: Common "Copper" on all domains
    def: def "Basic"
      relpermeability = 1
      electricconductivity = 5.998e7[S/m]
      thermalexpansioncoefficient = 17e-6[1/K]
      heatcapacity = 385[J/(kg*K)]
      relpermittivity = 1
      density = 8960[kg/m^3]
      thermalconductivity = 400[W/(m*K)]
    Enu: Enu "Young's modulus and Poisson's ratio"
      E = 110e9*(273.15/T)[K*Pa]
      nu = 0.35
    linzRes: linzRes "Linearized resistivity"
      rho0 = 1.72e-8[ohm*m]
      alpha = 0.0039[1/K]
      Tref = 298[K]

Physics
  ec: ConductiveMedia "Electric Currents" on all domains
    dependent variable V
    cucns1: CurrentConservationSolid "Current Conservation in Solids 1" (default)
      ConstitutiveRelationJcE = LinearizedResistivity
    ein1: ElectricInsulation (default)
    init1: init "Initial Values 1" (default)
    term1: Terminal "Boundary Terminal 1" on boundaries 1 | I0 = 2000
    gnd1: Ground on boundaries 90
  ht: HeatTransfer "Heat Transfer in Solids" on all domains
    dependent variable T
    solid1: SolidHeatTransferModel "Solid 1" (default)
    init1: init "Initial Values 1" (default)
    ins1: ThermalInsulation (default)
    sar1: SurfaceToAmbientRadiation on all boundaries | epsilon_rad_mat = userdef; epsilon_rad = 1
    hf1: HeatFluxBoundary "Heat Flux 1" on all boundaries | HeatFluxType = ConvectiveHeatFlux; h = 5
    temp1: TemperatureBoundary "Temperature 1" on boundaries 1, 90
  solid: SolidMechanics on all domains
    dependent variable u = {u, v, w}
    lemm1: LinearElasticModel "Linear Elastic Material 1" (default)
    free1: Free (default)
    init1: init "Initial Values 1" (default)
    fix1: Fixed "Fixed Constraint 1" on boundaries 1
    bl1: BodyLoad on domains 1

Multiphysics
  emh1: ElectromagneticHeating on all domains | EMHeat_physics = ec; Heat_physics = ht

Mesh
  mesh1 "Mesh 1" (physics-controlled)

Studies
  std1 "Study 1"
    stat: Stationary

Solver configurations
  sol1 "Solution 1" (study std1)
    v1: Variables "Dependent Variables 1"
    s1: Stationary "Stationary Solver 1"
      se1: Segregated
        ss1: SegregatedStep "Electric Currents"
        ss2: SegregatedStep "Temperature"
        ss3: SegregatedStep "Solid Mechanics"
        ll1: LowerLimit
      i1: Iterative
        mg1: Multigrid
      d1: Direct "Direct, heat transfer variables (ht)"
      d2: Direct "Suggested Direct Solver (solid)"

Datasets
  dset1: Solution | solution = sol1

Plots
  pg1: PlotGroup3D "Electric Potential (ec)" | data = dset1
    vol1: Volume | expr = V
  pg2: PlotGroup3D "Electric Field (ec)" | data = dset1
    mslc1: Multislice
      expr = ec.normE
      multiplanexmethod = coord
      xcoord = ec.CPx
      multiplaneymethod = coord
      ycoord = ec.CPy
      multiplanezmethod = coord
      zcoord = ec.CPz
    strmsl1: StreamlineMultislice
      expr = {ec.Ex, ec.Ey, ec.Ez}
      multiplanexmethod = coord
      xcoord = ec.CPx
      multiplaneymethod = coord
      ycoord = ec.CPy
      multiplanezmethod = coord
      zcoord = ec.CPz
      tran1: Transparency | transparency = 0.9; expr = V
      filt1: Filter | expr = !isScalingSystemDomain
  pg3: PlotGroup3D "3D Plot Group 3" | data = dset1
    surf1: Surface | expr = ec.normJ
    mms1: MaxMinSurface | expr = ec.normJ; table = mm1
  pg4: PlotGroup3D "3D Plot Group 4" | data = dset1
    surf1: Surface | expr = T
    mms1: MaxMinSurface | expr = T; table = mm2
  pg5: PlotGroup3D "3D Plot Group 5" | data = dset1
    surf1: Surface | expr = solid.mises